# Лабораторная работа номер 4 Ковалёва Александра
K(x) :=
    z ← (x^2 + 2*x - 3 + (x + 1)*sqrt(x^2 - 9))/(x^2 - 2*x - 3 + (x + 1)*sqrt(x^2 - 9))
    return z
K(-2) = -0.333333 - 0.596285i
K(5) = 1.55556
K(10) = 1.21986
K(100) = 1.02011
