x := 0.1, 0.2 .. 1
b := 1.5
Q(b, x) :=
    if (x*b) < 1
        z ← b*x - ln(b)*x
        return z
    if (b*x) == 0
        z ← 1
        return z
    if (x*b) > 1
        z ← b*x + ln(b)*x
        return z
Q(b, x) = [0.109453; 0.218907; 0.32836; 0.437814; 0.547267; 0.656721; 1.33383; 1.52437; 1.71492; 1.90547]
