k := 0, 0.5 .. 10
m := 10
t := 3.2*10^-4
F(k) :=
    if k < 5
        z ← sqrt(m^2 + k^3)
        return z
    if k ≥ 5
        z ← cos(k)^2 + t
        return z
F(k) = [10; 10.0062; 10.0499; 10.1673; 10.3923; 10.7529; 11.2694; 11.953; 12.8062; 13.8248; 0.0807842; 0.502533; 0.922247; 0.954043; 0.568689; 0.120476; 0.0214903; 0.362738; 0.830478; 0.994672; 0.704361]
