# Лабораторная работа номер 1 студента Ковалёва Александра Александровича
x := -2, -1.8 .. 2
a := -π/2
b := π/2
A := [3, 2, 3; 4, 8, 6; 7, 8, 9]
V := [1; 2; 3]
B := [2, 5, 1; 7, 6, 7; 4, 3, 2]
(4*sqrt(5 - 2*sqrt(6)))/((nthroot(3, 4) + nthroot(2, 4))*(nthroot(2, 4) - nthroot(3, 4))) = -4
x := 2
n := 10
integral(4*sin(2*t)/cos(3*t)^2 + sqrt(3*n*t), t = a .. b) = 7.18494 + 7.18817i
C := A*V = [16; 38; 50]
d := |A|*|B| = 588
(sqrt(x^3 + n) + cos(|n*x - 1|))/nthroot(x^5 + 8*x + n, 4) = 1.89564
y(x) := cos(x^3)^2 - e^(2*x)*tan(x)
g := (transpose(V)*A)*V = 242
S := B*V = [15; 40; 16]
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E := A^-1*C - B  # error: Эти измерения массива не соответствуют.
(sum(sin(i/n), i = 1 .. 10) + sum((i - n)/(i + n), i = 1 .. 5))/product((n + 3i)/(n^2 + n*i - n), i = 1 .. 5) = 48891.6 - 428865i
x
q := max(A) = 9
p := min(B) = 1
f(x, y) := e^(sin(x) + sin(y))
n := 50
i := 0 .. n - 1
j := 0 .. n - 1
x0 := -5
dx := 0.2
y0 := -5
dy := 0.2
x[i] := x0 + i*dx
y[j] := y0 + j*dy
M[i, j] := f(x[i], y[j])
# [component: inputs M]
