# Лабораторная работа номер 2 Ковалёва Александра
x := -3, -2 .. 3
f(x) := (x - 1)^2 - 2*e^x
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x := 0
root(f(x), x) = -0.248793
x := -3, -2 .. 3
f(x) := (x - 2)*sin(x) - 1
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x := -2
root(f(x), x) = -2.93766
x := 0
root(f(x), x) = -0.425047
