g(x) := x^4 - 5*x^3 + x^2 - 15*x + 50
V := [50; -15; 1; -5; 1]
x := polyroots(V)
x = [-1 - 2i; -1 + 2i; 2; 5]
x := -1 + 2i
x^4 - 5*x^3 + x^2 - 15*x + 50 = 0
x := -1 - 2i
x^4 - 5*x^3 + x^2 - 15*x + 50 = 0
x := 2
x^4 - 5*x^3 + x^2 - 15*x + 50 = 0
x := 5
x^4 - 5*x^3 + x^2 - 15*x + 50 = 0
