x1 := 0
x2 := 0
x3 := 0
x4 := 0
Given
x1 + 2*x2 + 3*x3 + 4*x4 == 26
2*x1 + 3*x2 + 4*x3 + x4 == 34
3*x1 + 4*x2 + x3 + 2*x4 == 26
4*x1 + x2 + 2*x3 + 3*x4 == 26
V := Find(x1, x2, x3, x4)
V = [2.8; 2.8; 4.8; 0.8]
A := [1, 2, 3, 4; 2, 3, 4, 1; 3, 4, 1, 2; 4, 1, 2, 3]
B := [26; 34; 26; 26]
X := A^-1*B = [2.8; 2.8; 4.8; 0.8]
lsolve(A, B) = [2.8; 2.8; 4.8; 0.8]
