# Лабораторная работа номер 3 Ковалёва Александра
limit((e^(α*x) - e^(β*x))/(sin(α*x) - sin(β*x)), x → 0) → 1
y(x) := cos(x^3)^2 - e^(2*x)*tan(x)
d/dx(y(x)) → -e^(2*x)*(tan(x)^2 + 1) - 2*e^(2*x)*tan(x) - 6*x^2*cos(x^3)*sin(x^3)
integral(sin(x)/(1 - 3*cos(x))^3, x) → -1/(6*(3*cos(x) - 1)^2)
