k := 0, 0.5 .. 10
t := 3.2*10^-4
m := 10
k = [0; 0.5; 1; 1.5; 2; 2.5; 3; 3.5; 4; 4.5; 5; 5.5; 6; 6.5; 7; 7.5; 8; 8.5; 9; 9.5; 10]
F(k) := if(k < 5, sqrt(m^2 + k^3), cos(k)^2 + t)
F(k) = [10; 10.0062; 10.0499; 10.1673; 10.3923; 10.7529; 11.2694; 11.953; 12.8062; 13.8248; 0.0807842; 0.502533; 0.922247; 0.954043; 0.568689; 0.120476; 0.0214903; 0.362738; 0.830478; 0.994672; 0.704361]
cos(k)^2 + t = [1.00032; 0.770471; 0.292247; 0.00532375; 0.173498; 0.642151; 0.980405; 0.877271; 0.42757; 0.0447549; 0.0807842; 0.502533; 0.922247; 0.954043; 0.568689; 0.120476; 0.0214903; 0.362738; 0.830478; 0.994672; 0.704361]
sqrt(m^2 + k^3) = [10; 10.0062; 10.0499; 10.1673; 10.3923; 10.7529; 11.2694; 11.953; 12.8062; 13.8248; 15; 16.321; 17.7764; 19.3552; 21.0476; 22.8446; 24.7386; 26.7231; 28.7924; 30.9415; 33.1662]
